*Heading
** Wing comparison case for Abaqus/Standard
** Units: consistent with the current Wing.dat
*Preprint, echo=NO, model=NO, history=NO, contact=NO
*Node
1, 0.0, 0.0, 0.0
2, 0.0, 0.0, 0.1
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*Element, type=B31
1, 1, 2
2, 2, 3
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*Nset, nset=NFIX
1,
*Nset, nset=NTIP
51,
*Nset, nset=NMID
26,
*Elset, elset=EALL, generate
1, 50, 1
** Beam axis is global +Z and section axis 1 follows the current Wing.dat dir vector: global +Y.
** I11 maps to IA, I22 maps to IB, and J maps to IP from Wing.dat.
*Beam General Section, elset=EALL, section=GENERAL, density=28.86836
3.464E-2, 3.463796E-06, 0.0, 2.886666E-03, 1.3855187E-05
0.0, 1.0, 0.0
288.86836, 115.47344
*Boundary
NFIX, 1, 6
*Step, name=WING_DYNAMIC_COMPARE, nlgeom=YES, inc=20000
*Dynamic, alpha=0.0
1.0E-4, 1.5E-2, 1.0E-10, 1.0E-4
*Cload
NTIP, 1, -0.008
NTIP, 2, 0.008
NTIP, 3, 0.008
NTIP, 4, 0.0
NTIP, 5, 0.0
NTIP, 6, 0.008
*Output, field, number interval=20
*Node Output
U, UR, V, A
*Output, history, frequency=1
*Node Output, nset=NMID
U, UR
*Node Output, nset=NTIP
U, UR
*End Step
